<?xml version="1.0" encoding="UTF-8"?>
<neuroml xmlns="http://www.neuroml.org/schema/neuroml2" xmlns:xsi="http://www.w3.org/2001/XMLSchema-instance" xsi:schemaLocation="http://www.neuroml.org/schema/neuroml2  https://raw.github.com/NeuroML/NeuroML2/development/Schemas/NeuroML2/NeuroML_v2beta1.xsd" id="network_GranCellLayer">

<notes>

Network structure (NeuroML 2beta1) for project: GranCellLayer saved with neuroConstruct v1.7.0 on: 14:05:39, 30-Sep-13

Cell Group: Golgis contains 4 cells
Cell Group: Grans contains 75 cells
Cell Group: Mossies contains 12 cells

Network connection: NetConn_Golgis_Grans contains 75 individual synaptic connections
Network connection: NetConn_Mossies_Grans contains 300 individual synaptic connections
Network connection: NetConn_Grans_Golgis contains 300 individual synaptic connections

</notes>

    <spikeGeneratorPoisson id="Input_0" averageRate="50.0 per_ms"/>

    <network id="network_GranCellLayer" type="networkWithTemperature" temperature="32.0 degC">

        <population id="Golgis" component="Golgi_98" type="populationList">
            <instance id="0">
                <location x="0.0" y="100.0" z="0.0"/>
            </instance>
            <instance id="1">
                <location x="300.0" y="100.0" z="0.0"/>
            </instance>
            <instance id="2">
                <location x="600.0" y="100.0" z="0.0"/>
            </instance>
            <instance id="3">
                <location x="900.0" y="100.0" z="0.0"/>
            </instance>
        </population>

        <population id="Grans" component="Granule_98" type="populationList">
            <instance id="0">
                <location x="0.0" y="50.0" z="0.0"/>
            </instance>
            <instance id="1">
                <location x="12.162162" y="50.0" z="0.0"/>
            </instance>
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        </population>

        <population id="Mossies" component="MossyFiber" type="populationList">
            <instance id="0">
                <location x="0.0" y="0.0" z="0.0"/>
            </instance>
            <instance id="1">
                <location x="81.818184" y="0.0" z="0.0"/>
            </instance>
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        </population>

        <population id="Input_0_population" component="Input_0_population" size="12"/>    <projection id="NetConn_Golgis_Grans" presynapticPopulation="Golgis" postsynapticPopulation="Grans" synapse="GABAA">
            <connection id="0" preCellId="../Golgis/0/Golgi_98" postCellId="../Grans/0/Granule_98" preSegmentId="0" preFractionAlong="0.0" postSegmentId="0" postFractionAlong="0.5"/>
            <connection id="1" preCellId="../Golgis/0/Golgi_98" postCellId="../Grans/1/Granule_98" preSegmentId="0" preFractionAlong="0.0" postSegmentId="0" postFractionAlong="0.5"/>
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        </projection>

        <projection id="NetConn_Mossies_Grans" presynapticPopulation="Mossies" postsynapticPopulation="Grans" synapse="MF_AMPA">
            <connection id="0" preCellId="../Mossies/0/MossyFiber" postCellId="../Grans/0/Granule_98" preSegmentId="0" preFractionAlong="0.5" postSegmentId="0" postFractionAlong="0.5"/>
            <connection id="1" preCellId="../Mossies/1/MossyFiber" postCellId="../Grans/0/Granule_98" preSegmentId="0" preFractionAlong="0.5" postSegmentId="0" postFractionAlong="0.5"/>
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        </projection>

        <projection id="Input_0_projection">
    <connection id="0"/>

    <connection id="1"/>

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    </projection>    <projection id="NetConn_Grans_Golgis" presynapticPopulation="Grans" postsynapticPopulation="Golgis" synapse="AMPA_GranGol">
            <connection id="0" preCellId="../Grans/0/Granule_98" postCellId="../Golgis/3/Golgi_98" preSegmentId="0" preFractionAlong="0.5" postSegmentId="0" postFractionAlong="0.5"/>
            <connection id="1" preCellId="../Grans/0/Granule_98" postCellId="../Golgis/0/Golgi_98" preSegmentId="0" preFractionAlong="0.5" postSegmentId="0" postFractionAlong="0.5"/>
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        </projection>

    </network>

</neuroml>
